COEFkJ := 1000 J
# 1-Simple model with pure counter flow and given ε := 90% and ΔP := 2%
# Inputs:
m_dot_CO2 := 567 kg/s
kJ := 1000 J
m_dot_SS := 461 kg/s
T_CO2_inlet := 435 °C = 708.15 K
T_SS_inlet := 565 °C = 838.15 K
c_p_CO2 := 1170 J/(kg*K)
c_p_SS := 1540.16*J/(kg*K)
P_CO2_inlet := 24934 kPa = 24934000 Pa
P_SS_inlet
t_p := 1.63 mm = 0.00163 m
P_CO2_outlet := P_CO2_inlet - ΔP*P_CO2_inlet = 24435320 Pa
Cp_CO2_inlet := PropsSI("CPMASS", "T", T_CO2_inlet, "P", P_CO2_inlet, "CO2") = 1246.06
# The CO2 is the cold side while the solar salt (SS) is the hot side, we can assume that the cold side reaches the temperature of the hot side at the CO2 outlet.
# Getting the specific enthalpy values for the cold side :
T_CO2_outlet := T_SS_inlet = 838.15 K
h_CO2_inlet := 8.882*10^5 J/kg
h_CO2_outlet := 1.051*10^6 J/kg
Q_dot_max := m_dot_CO2*(h_CO2_outlet - h_CO2_inlet) = 92307.6 kW
Q_dot := ε*Q_dot_max = 83.0768 MW
# 2-Simple model with pure counter flow and finding the UA value:
# For the sCO2:
D := 1.9 mm
L := 1 m
D_h := 1.222 mm
Ra := 10 μm
k_p := 14.4 W/(m*K)  # [14]
ρ_CO2 := 181.924 kg/m^3
μ_CO2 := 3.53*10^-5 N*s/m^2
Pr_CO2 := 0.781
k_CO2 := 0.056*W/(m*K)
A := (1/2*π*D + D)*L = 0.00488451 m^2
v_CO2 := m_dot_CO2/(ρ_CO2*A) = 638.075 m/s
Re_CO2 := (v_CO2*D_h*ρ_CO2)/μ_CO2 = 4018447
f_D_CO2 := 0.25/log(Ra/(3.7*D_h) + 5.74/Re_CO2^0.9)^2 = 0.0354929  # [14]
Nu_CO2 := (f_D_CO2/8)*(Re_CO2 - 1000)*Pr_CO2/(1 + 12.7*(f_D_CO2/8)^0.5*(Pr_CO2^(2/3) - 1)) = 15973.2  # [14]
h_CO2_coef := Nu_CO2*k_CO2/D = 470790 W/(m^2*K)
# For the solar salt with values from the python program
k_SS := 0.450 W/(m*K)
μ_SS := 3.746*10^-3 kg/(m*s)
ρ_SS := 1.731*10^3 kg/m^3
Pr_SS := μ_SS*c_p_SS/k_SS = 12.821
v_SS := m_dot_SS/(ρ_SS*A) = 54.5234 m/s
Re_SS := v_SS*D_h*ρ_SS/μ_SS = 30788.1
f_D_SS := 0.25/log(Ra/(3.7*D_h) + 5.74/Re_SS^0.9)^2 = 0.03806  # [14]
Nu_SS := (f_D_SS/8)*(Re_SS - 1000)*Pr_SS/(1 + 12.7*(f_D_SS/8)^0.5*(Pr_SS^(2/3) - 1)) = 369.108  # [14]
h_SS_coef := Nu_SS*k_SS/D = 87420.3 W/(m^2*K)
UA := (1/(h_CO2_coef*A) + t_p/(k_p*A) + 1/(h_SS_coef*A))^-1 = 38.5343 W/K
C_min := c_p_CO2*m_dot_CO2 = 663390 kg*m^2/(s^3*K)
C_max := c_p_SS*m_dot_SS = 710014 kg*m^2/(s^3*K)
C_r := C_min/C_max = 0.934334
NTU := C_min/UA = 17215.6
ε_ch := (1 - e^(-NTU*(1 - C_r)))/(1 - C_r*e^(-NTU*(1 - C_r))) = 1
Q_dot_max_ch := C_min*(T_SS_inlet - T_CO2_inlet) = 86240700 W
Q_dot_ch := ε_ch*Q_dot_max_ch = 86.2407 MW
